// COMSOL Multiphysics 6.3.0.290 model "progettoR_2901.mph"
// Outline of the model tree

Parameters
  D = 113.05 [m^2 / s]
  Da = 1.10 [s^-1]
  S = 5.60
  k = 10.89 [s^-1]
  B = 0.12
  R0 = 0.5 [m]
  R1 = 1 [m]
  DD = 1 [m^2 / s]

Variables
  var1 "Variables 1"
    b_2 = b_0_pos^2
    Mtot = 4*pi*((b_0+c+b_1)*r^2)
    source = Da * (S - c_pos) *b_0_pos^(2/3)
    b_0_pos = if(b_0<eps, eps, b_0)
    c_pos = if(c<eps, eps, c)
    source_pos = if(source<eps, eps, source)

Geometry
  geom1 "Geometry 1" (1D axisymmetric, length unit m)
    i1: Interval | coord = {0, R0}
    i2: Interval | coord = {R0, R1}
    fin: Finalize "Form Union"

Physics
  c: CoefficientFormPDE "Diffusione della c" on all domains
    dependent variable c
    EquationForm.form = Automatic
    Units.CustomSourceTermUnit = s^-1
    cfeq1: CoefficientFormPDE (default) | c = D; a = 0; f = source_pos; da = 1; al = 0; be = -2*D/r; ga = 0
    zflx1: ZeroFluxBoundary "Zero Flux 1" (default)
    init1: init "Initial Values 1" (default)
    cfeq2: CoefficientFormPDE on domains 2 | c = DD; a = k; f = 0; da = 1; al = 0; be = -2 * DD/r
    dir1: DirichletBoundary "Dirichlet Boundary Condition 1" on boundaries 3 | r = 0
  b_0: DomainODE "Evoluzione della b0" on domains 1
    dependent variable b_0
    EquationForm.form = Automatic
    Units.CustomSourceTermUnit = s^-1
    dode1: DistributedODE (default) | f = -source_pos; da = 1
    init1: init "Initial Values 1" (default) | b_0 = 1
  b_1: DomainODE "Evoluzione della b_1" on domains 2
    dependent variable b_1
    EquationForm.form = Automatic
    Units.CustomSourceTermUnit = s^-1
    dode1: DistributedODE (default) | f = k * c_pos; da = 1
    init1: init "Initial Values 1" (default) | b_1 = B
  b_0_vecchia: CoefficientFormPDE (disabled) on domains 1
    dependent variable b_0
    EquationForm.form = Automatic
    Units.CustomSourceTermUnit = s^-1
    cfeq1: CoefficientFormPDE (default) | c = 0; f = -Da * (b_2 *( b_0>0))^(1/3 + 2/3* (b_0>0)) * (S-c); da = 1
    zflx1: ZeroFluxBoundary "Zero Flux 1" (default)
    init1: init "Initial Values 1" (default) | b_0 = 1
  b_1_vecchia: CoefficientFormPDE (disabled) on all domains
    dependent variable b_1
    EquationForm.form = Automatic
    Units.CustomSourceTermUnit = s^-1
    cfeq1: CoefficientFormPDE (default) | c = 0; f = k*c; da = 1
    zflx1: ZeroFluxBoundary "Zero Flux 1" (default)
    init1: init "Initial Values 1" (default) | b_1 = B

Mesh
  mesh1 "Mesh 1" (physics-controlled)
    size: MeshSizeDefault | hauto = 1

Studies
  std1 "Study 1"
    time: Transient "Time Dependent"
      tlist = range(0,0.02,1)
      pname = {D, Da, S, k}
      plistarr = {35.6000000000000 38.2989576883385 41.2300309597523 44.3932198142415 47.7885242518060 51.4159442724458 55.2754798761610 59.3671310629515 63.6908978328173 68.2467801857585 73.0347781217750 78.0548916408669 83.3071207430341 88.7914654282766 94.5079256965945 100.456501547988 106.637192982456 113.050000000000, 0.63 0.685188854489 0.73693498452 0.785238390093 0.830099071207 0.871517027864 0.909492260062 0.944024767802 0.975114551084 1.00276160991 1.02696594427 1.04772755418 1.06504643963 1.07892260062 1.08935603715 1.09634674923 1.09989473684 1.1, 2.64 2.68030546956 2.7373374613 2.81109597523 2.90158101135 3.00879256966 3.13273065015 3.27339525284 3.43078637771 3.60490402477 3.79574819401 4.00331888545 4.22761609907 4.46863983488 4.72639009288 5.00086687307 5.29207017544 5.6, 0.47 0.989285861713 1.52027863777 2.06297832817 2.61738493292 3.18349845201 3.76131888545 4.35084623323 4.95208049536 5.56502167183 6.18966976264 6.8260247678 7.47408668731 8.13385552116 8.80533126935 9.48851393189 10.1834035087719 10.8900000000000}
      punit = {m^2/s, 1/s, , 1/s}

Solver configurations
  sol1 "Solution 1" (study std1)
    v1: Variables "Dependent Variables 1"
    t1: Time "Time-Dependent Solver 1"
      dDef: Direct
      fc1: FullyCoupled

Datasets
  dset1: Solution | solution = sol1
  rev1: Revolve1D "Revolution 1D 1" | data = dset1; startangle = -90; revangle = 225

Derived values
  int1: IntLine "Line Integration 1" on domains 1
    data = dset1
    table = tbl3
    expr = {c * r^2, b_0 * r^2, }
    unit = {cm^4, cm^4, }
    intsurface = on
  int2: IntLine "Line Integration 2" on domains 2
    data = dset1
    table = tbl3
    expr = {c * r^2, b_1 * r^2}
    unit = {cm^4, cm^4}
    intsurface = on

Tables
  tbl1: Table
    // Line Integration 1
    Time (s) | c * r^2 (m^4) | b_0 * r^2 (m^4)
    0 | 3.05709e-14 | 9.81711e-10
    0.1 | 2.938e-13 | 6.07045e-10
    0.2 | 1.53037e-13 | 4.3789e-10
    0.3 | 9.46894e-14 | 3.44652e-10
    0.4 | 6.41882e-14 | 2.83654e-10
    0.5 | 4.62537e-14 | 2.40814e-10
    0.6 | 3.50089e-14 | 2.09506e-10
    0.7 | 2.74388e-14 | 1.85473e-10
    0.8 | 2.20624e-14 | 1.66313e-10
    0.9 | 1.81068e-14 | 1.50679e-10
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  tbl2: Table
    // Mtot
    Time (s) | c * r^2 (m^4) | b_0 * r^2 (m^4) | c * r^2 (m^4) | b_1 * r^2 (m^4)
    0 | 3.05709e-14 | 9.81711e-10 | 5.91168e-15 | 1.76715e-09
    0.1 | 2.938e-13 | 6.07045e-10 | 3.53222e-14 | 1.76721e-09
    0.2 | 1.53037e-13 | 4.3789e-10 | 1.84002e-14 | 1.76724e-09
    0.3 | 9.46894e-14 | 3.44652e-10 | 1.13851e-14 | 1.76725e-09
    0.4 | 6.41882e-14 | 2.83654e-10 | 7.71818e-15 | 1.76726e-09
    0.5 | 4.62537e-14 | 2.40814e-10 | 5.56192e-15 | 1.76727e-09
    0.6 | 3.50089e-14 | 2.09506e-10 | 4.2098e-15 | 1.76727e-09
    0.7 | 2.74388e-14 | 1.85473e-10 | 3.29958e-15 | 1.76728e-09
    0.8 | 2.20624e-14 | 1.66313e-10 | 2.65308e-15 | 1.76728e-09
    0.9 | 1.81068e-14 | 1.50679e-10 | 2.17743e-15 | 1.76728e-09
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  tbl3: Table
    // Mtot
    Time (s) | c * r^2 (cm^4) | b_0 * r^2 (cm^4) | c * r^2 (cm^4) | b_1 * r^2 (cm^4)
    0 | 2.38472e-06 | 0.0981724 | 3.55653e-08 | 0.176715
    0.01 | 0.00364937 | 0.0924976 | 0.00296022 | 0.176727
    0.02 | 0.00571066 | 0.0874615 | 0.00733428 | 0.176778
    0.03 | 0.00697468 | 0.0829586 | 0.0117268 | 0.176874
    0.04 | 0.00773448 | 0.0789072 | 0.0155347 | 0.17701
    0.05 | 0.00815476 | 0.0752413 | 0.0185417 | 0.177181
    0.06 | 0.00835997 | 0.0718953 | 0.0207311 | 0.177375
    0.07 | 0.0084234 | 0.068827 | 0.0221488 | 0.177588
    0.08 | 0.00837181 | 0.0660024 | 0.0230029 | 0.17781
    0.09 | 0.00822816 | 0.0634 | 0.0233847 | 0.17804
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
Plots
  pg1: PlotGroup1D "Coefficient Form PDE" | data = dset1
    lngr1: LineGraph on domains 1, 2 | expr = c; xdata = expr; xdataexpr = r
  pg2: PlotGroup2D "Coefficient Form PDE 1" | data = rev1
    surf1: Surface | expr = c
  pg3: PlotGroup1D "Domain ODEs and DAEs" | data = dset1
    lngr1: LineGraph on domains 1 | expr = b_0; xdata = expr; xdataexpr = r
  pg4: PlotGroup2D "Domain ODEs and DAEs 1" | data = rev1
    surf1: Surface | expr = b_0
  pg5: PlotGroup1D "Domain ODEs and DAEs 2" | data = dset1
    lngr1: LineGraph on domains 2 | expr = b_1; xdata = expr; xdataexpr = r
  pg6: PlotGroup2D "Domain ODEs and DAEs 2.1" | data = rev1
    surf1: Surface | expr = b_1

Exports
  data1: Data | data = dset1; expr = {c, b_0, b_1}; filename = P:\progetto\datiR2_3012ph4.txt; parameterlayout = rows
  tbl1: Table | table = tbl1; filename = IntegraliR2612
  plot1: Plot
  img1: Image
    sourceobject = pg3
    size = current
    unit = px
    width = 800
    height = 600
    pngfilename = P:\progetto\graficob0.png